# OpenSim document version 30000
ScaleTool generic:
  mass: 75
  height: 1750
  age: 30
  GenericModelMaker generic:
    model_file: D:\opensim\model.osim
    marker_set_file: D:\opensim\markerSet.xml
  ModelScaler generic:
    scaling_order: measurements
    time_range: [0 2]
    preserve_mass_distribution: true
    MeasurementSet: file=D:\opensim\measurementSet.xml
  MarkerPlacer generic:
    time_range: [0 2]
    max_marker_movement: -1
    IKTaskSet: file=D:\opensim\tasksScale.xml
